Tue 04/09/2024
03:11 PM
$PROBLEM    ev_no-delay_first-order_one-compartment_linear
$INPUT      ID TIME EVID AMT DV RACEN WTKG Race=DROP
$DATA      F1003-Asian-PK-Study.csv IGNORE=@
$SUBROUTINE ADVAN13 TRANS1 TOL=9 SUBROUTINES=D
$MODEL      COMP=(DEPOT,DEFDOSE) COMP=(CENTRAL,DEFOBS)
$PK

TVKA = THETA(1)
KA = TVKA

TVCL = THETA(2)*(WTKG/71.0)**THETA(4)
CL = TVCL*EXP(ETA(1))

TVV = THETA(3)*(WTKG/71.0)**THETA(5)
V = TVV*EXP(ETA(2))
S2 = V

$DES

DADT(1) = -KA*A(1)
DADT(2) = KA*A(1) - (CL/V)*A(2)

$ERROR

IPRED = F
IRES = DV-IPRED
W = SQRT(IPRED**2*SIGMA(1,1))
IWRES = IRES/W
Y = F + F*EPS(1)

$THETA  (0,0.783) ; KA; 1/hr ;Absorption Rate Constant
 (0,17.3) ; CL; L/hr ;Clearance
 (0,84.0) ; V; L    ;Volume of Distribution
 1.83 ; WTonCL
 1 ; WTonV
$OMEGA  BLOCK(2)
 0.0103  ;        CL_
 0.00 0.111  ;         V_
$SIGMA  0.0206  ; Proportional
$ESTIMATION METHOD=1 INTER NOABORT MAXEVAL=9999 PRINT=5 NSIG=3 SIGL=9
            NOTHETABOUNDTEST NOOMEGABOUNDTEST NOSIGMABOUNDTEST
$COVARIANCE PRINT=E UNCONDITIONAL
$TABLE      ID TIME DV MDV EVID IPRED CWRES IWRES ONEHEADER NOPRINT
            FILE=sdtab1
$TABLE      ID KA CL V ETAS(1:LAST) ONEHEADER NOPRINT FILE=patab1 ; model parameters
$TABLE      ID RACEN ONEHEADER NOPRINT FILE=catab1 ; categorical covariates
$TABLE      ID WTKG ONEHEADER NOPRINT FILE=cotab1 ; continuous covariates

NM-TRAN MESSAGES
 WARNINGS AND ERRORS (IF ANY) FOR PROBLEM    1
 (WARNING  2) NM-TRAN INFERS THAT THE DATA ARE POPULATION.
 (WARNING  79) SIGMA IS USED ON THE RIGHT. WITH A SUBSEQUENT RUN, IF AN
 INITIAL ESTIMATE OF A DIAGONAL BLOCK OF SIGMA IS TO BE COMPUTED BY
 NONMEM, THAT BLOCK WILL BE SET TO AN IDENTITY MATRIX DURING THAT
 COMPUTATION. THIS COULD LEAD TO AN ARITHMETIC EXCEPTION.*
 * THE MAXIMUM NUMBER OF WARNINGS OF ONE OR MORE TYPES WAS REACHED.
 IT IS POSSIBLE THAT SOME WARNING MESSAGES WERE SUPPRESSED.

1NONLINEAR MIXED EFFECTS MODEL PROGRAM (NONMEM) VERSION 7.4.4
 ORIGINALLY DEVELOPED BY STUART BEAL, LEWIS SHEINER, AND ALISON BOECKMANN
 CURRENT DEVELOPERS ARE ROBERT BAUER, ICON DEVELOPMENT SOLUTIONS,
 AND ALISON BOECKMANN. IMPLEMENTATION, EFFICIENCY, AND STANDARDIZATION
 PERFORMED BY NOUS INFOSYSTEMS.
 PROBLEM NO.:         1
 ev_no-delay_first-order_one-compartment_linear
 TOT. NO. OF OBS RECS:     1400
 TOT. NO. OF INDIVIDUALS:      100
 GENERAL NONLINEAR KINETICS MODEL WITH STIFF/NONSTIFF EQUATIONS (LSODA, ADVAN13)
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 #TBLN:      1
 #METH: First Order Conditional Estimation with Interaction
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
 #TERM:
0MINIMIZATION SUCCESSFUL
 NO. OF FUNCTION EVALUATIONS USED:      224
 NO. OF SIG. DIGITS IN FINAL EST.:  3.5

 ETABAR IS THE ARITHMETIC MEAN OF THE ETA-ESTIMATES,
 AND THE P-VALUE IS GIVEN FOR THE NULL HYPOTHESIS THAT THE TRUE MEAN IS 0.

 ETABAR:        -4.1940E-05 -6.8459E-04
 SE:             9.6771E-03  7.6213E-03
 N:                     100         100

 P VAL.:         9.9654E-01  9.2843E-01

 ETASHRINKSD(%)  4.9065E+00  1.2420E+01
 ETASHRINKVR(%)  9.5723E+00  2.3297E+01
 EBVSHRINKSD(%)  5.3297E+00  1.2753E+01
 EBVSHRINKVR(%)  1.0375E+01  2.3879E+01
 EPSSHRINKSD(%)  5.8347E+00
 EPSSHRINKVR(%)  1.1329E+01


 TOTAL DATA POINTS NORMALLY DISTRIBUTED (N):         1400
 N*LOG(2PI) CONSTANT TO OBJECTIVE FUNCTION:    2573.0278929730835
 OBJECTIVE FUNCTION VALUE WITHOUT CONSTANT:   -6645.4473027426147
 OBJECTIVE FUNCTION VALUE WITH CONSTANT:      -4072.4194097695313
 REPORTED OBJECTIVE FUNCTION DOES NOT CONTAIN CONSTANT

 TOTAL EFFECTIVE ETAS (NIND*NETA):                           200


 #TERE:
 Elapsed estimation  time in seconds:    49.94
 Elapsed covariance  time in seconds:    57.79
 Elapsed postprocess time in seconds:     0.86

 ********************               FIRST ORDER CONDITIONAL ESTIMATION WITH INTERACTION              ********************
 #OBJT:**************                       MINIMUM VALUE OF OBJECTIVE FUNCTION                      ********************
 #OBJV:********************************************    -6645.447       **************************************************

 ********************               FIRST ORDER CONDITIONAL ESTIMATION WITH INTERACTION              ********************
 ********************                             FINAL PARAMETER ESTIMATE                           ********************

 THETA - VECTOR OF FIXED EFFECTS PARAMETERS   *********
         TH 1      TH 2      TH 3      TH 4      TH 5
         7.82E-01  1.73E+01  8.58E+01  1.85E+00  1.58E+00

 OMEGA - COV MATRIX FOR RANDOM EFFECTS - ETAS  ********
         ETA1      ETA2
 ETA1
+        1.05E-02
 ETA2
+        0.00E+00  7.65E-03

 SIGMA - COV MATRIX FOR RANDOM EFFECTS - EPSILONS  ****
         EPS1
 EPS1
+        2.06E-02

 OMEGA - CORR MATRIX FOR RANDOM EFFECTS - ETAS  *******
         ETA1      ETA2
 ETA1
+        1.02E-01
 ETA2
+        0.00E+00  8.75E-02

 SIGMA - CORR MATRIX FOR RANDOM EFFECTS - EPSILONS  ***
         EPS1
 EPS1
+        1.43E-01

 ********************               FIRST ORDER CONDITIONAL ESTIMATION WITH INTERACTION              ********************
 ********************                            STANDARD ERROR OF ESTIMATE                          ********************

 THETA - VECTOR OF FIXED EFFECTS PARAMETERS   *********
         TH 1      TH 2      TH 3      TH 4      TH 5
         9.56E-03  1.93E-01  9.54E-01  5.61E-02  5.84E-02

 OMEGA - COV MATRIX FOR RANDOM EFFECTS - ETAS  ********
         ETA1      ETA2
 ETA1
+        1.37E-03
 ETA2
+       .........  1.32E-03

 SIGMA - COV MATRIX FOR RANDOM EFFECTS - EPSILONS  ****
         EPS1
 EPS1
+        7.76E-04

 OMEGA - CORR MATRIX FOR RANDOM EFFECTS - ETAS  *******
         ETA1      ETA2
 ETA1
+        6.68E-03
 ETA2
+       .........  7.54E-03

 SIGMA - CORR MATRIX FOR RANDOM EFFECTS - EPSILONS  ***
         EPS1
 EPS1
+        2.71E-03

 ********************               FIRST ORDER CONDITIONAL ESTIMATION WITH INTERACTION              ********************
 ********************                          COVARIANCE MATRIX OF ESTIMATE                         ********************

            TH 1      TH 2      TH 3      TH 4      TH 5      OM11      OM12      OM22      SG11
 TH 1
+        9.14E-05
 TH 2
+        4.43E-04  3.74E-02
 TH 3
+        3.98E-03  4.32E-02  9.11E-01
 TH 4
+        2.63E-05 -1.29E-03  2.97E-03  3.15E-03
 TH 5
+       -3.42E-05  1.99E-04 -9.29E-03 -6.97E-04  3.41E-03
 OM11
+        1.65E-06  4.01E-05 -1.69E-05  1.74E-07  2.57E-06  1.87E-06
 OM12
+       ......... ......... ......... ......... ......... ......... .........
 OM22
+        1.61E-06  3.00E-05 -1.13E-05 -1.14E-05  1.72E-05  5.97E-07 .........  1.74E-06
 SG11
+        3.04E-07  2.42E-05  1.35E-04 -6.69E-07 -3.62E-06  1.49E-07 ......... -2.40E-07  6.03E-07

 ********************               FIRST ORDER CONDITIONAL ESTIMATION WITH INTERACTION              ********************
 ********************                          CORRELATION MATRIX OF ESTIMATE                        ********************

            TH 1      TH 2      TH 3      TH 4      TH 5      OM11      OM12      OM22      SG11
 TH 1
+        9.56E-03
 TH 2
+        2.40E-01  1.93E-01
 TH 3
+        4.36E-01  2.34E-01  9.54E-01
 TH 4
+        4.90E-02 -1.19E-01  5.54E-02  5.61E-02
 TH 5
+       -6.12E-02  1.76E-02 -1.67E-01 -2.13E-01  5.84E-02
 OM11
+        1.26E-01  1.52E-01 -1.30E-02  2.27E-03  3.22E-02  1.37E-03
 OM12
+       ......... ......... ......... ......... ......... ......... .........
 OM22
+        1.28E-01  1.18E-01 -8.99E-03 -1.54E-01  2.23E-01  3.31E-01 .........  1.32E-03
 SG11
+        4.09E-02  1.61E-01  1.82E-01 -1.54E-02 -7.98E-02  1.40E-01 ......... -2.34E-01  7.76E-04
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
 ********************               FIRST ORDER CONDITIONAL ESTIMATION WITH INTERACTION              ********************
 ********************                      EIGENVALUES OF COR MATRIX OF ESTIMATE                     ********************

             1         2         3         4         5         6         7         8
         4.51E-01  5.50E-01  7.17E-01  7.69E-01  1.04E+00  1.12E+00  1.59E+00  1.77E+00
 Elapsed finaloutput time in seconds:     0.90
 #CPUT: Total CPU Time in Seconds,      108.422
