Tue 04/09/2024
03:13 PM
$PROBLEM    Simultaneous PKPD of the human anti-PCSK9 mAb evolocumab
$ABBREVIATED PROTECT
$INPUT      ID TIME DV AMT ADDL II CMT MDV EVID DOSEMG HEALTHY
$DATA      NM_data_evoPKPD.csv IGNORE=@
$SUBROUTINE ADVAN13 TRANS1 TOL=6
$MODEL      COMP=(DEPOT,DEFDOSE) ; evolocumab SC depot
            COMP=(TDA) ; total evolocumab amount in central
            COMP=(TLC,NODOSE) ; total ligand (PCSK9) concentration in central
            COMP=(CLDL,NODOSE) ; LDL cholesterol concentration
$PK

CALLFL=-2

;;;;; TMDD PK ;;;;;

TVKA = THETA(1)
KA = TVKA*EXP(ETA(1))

TVV = THETA(2)
V = TVV*EXP(ETA(2))

TVCL = THETA(3)
CL = TVCL*EXP(ETA(3))

TVKDEG = THETA(4)
KDEG = TVKDEG*EXP(ETA(4))

TVPCSK9_0 = THETA(5)*THETA(8)**(HEALTHY)
PCSK9_0 = TVPCSK9_0*EXP(ETA(5))

TVKSS = THETA(6)
KSS = TVKSS*EXP(ETA(6))

TVKINT = THETA(7)
KINT = TVKINT*EXP(ETA(7))

KEL = CL/V

KSYN = KDEG*PCSK9_0  ; zero-order PCSK9 production rate (nM/day)

F1 = THETA(9)

A_0(3) = PCSK9_0     ; change initial condition from default of zero

;;;;; PD ;;;;;

TVKOUT = THETA(10)
KOUT = TVKOUT*EXP(ETA(8))

TVLDLC_0 = THETA(11)
LDLC_0 = TVLDLC_0*EXP(ETA(9))

TVIMAX = THETA(12)
IMAX = TVIMAX*EXP(ETA(10))

TVIC50 = THETA(13)
IC50 = TVIC50*EXP(ETA(11))

INH0 = (IMAX*PCSK9_0)/(IC50+PCSK9_0)

KIN = KOUT*(1.0-INH0)*LDLC_0    ; zero-order LDL-C production rate (mg/dL/day)

A_0(4) = LDLC_0               ; change initial condition from default of zero

$DES

;;;;; TMDD PK ;;;;;

TDC = A(2)/V                                                         ; total evolocumab concentration (nM)
FDC = 0.5*((TDC-A(3)-KSS) + SQRT((TDC-A(3)-KSS)**2.0 + 4.0*KSS*TDC)) ; free evolocumab concentration (nM)
FLC = A(3) - (TDC - FDC)                                             ; free PCSK9 concentration (nM)

DADT(1) = -KA*A(1)                                            ; evolocumab SC depot (nmol)
DADT(2) =  KA*A(1) - KEL*FDC*V - (KINT*A(3)*FDC*V)/(KSS+FDC)  ; total evolocumab amount in central (nmol)
DADT(3) = KSYN - KDEG*A(3) - ((KINT-KDEG)*FDC*A(3))/(KSS+FDC) ; total PCSK9 concentration in central (nM)

;;;;; PD ;;;;;

INH = (IMAX*PCSK9_0)/(IC50+PCSK9_0)
IF (TIME.GT.0) INH = (IMAX*FLC)/(IC50+FLC)

DADT(4) = KIN - KOUT*(1.0-INH)*A(4)                           ; LDL-C concentration (mg/dL)

$ERROR

TDC2 = A(2)/V                                                            ; total evolocumab concentration (nM)
FDC2 = 0.5*((TDC2-A(3)-KSS) + SQRT((TDC2-A(3)-KSS)**2.0 + 4.0*KSS*TDC2)) ; free evolocumab concentration (nM)
FLC2 = A(3) - (TDC2 - FDC2)                                              ; free PCSK9 concentration (nM)

DRUG=0
IF(CMT.EQ.2)DRUG=1

LIG=0
IF(CMT.EQ.3)LIG=1

LDL=0
IF(CMT.EQ.4)LDL=1

IF(CMT.EQ.2)THEN
  IPRED = FDC2*144/1000	; convert nM to mcg/mL, approximate MW of evolocumab is 144 kDa
  IRES = DV-IPRED
  W = SQRT(IPRED**2*SIGMA(1,1)+SIGMA(2,2))
  IWRES = IRES/W
ENDIF

IF(CMT.EQ.3)THEN
  IPRED = FLC2
  IRES = DV-IPRED
  W = SQRT(IPRED**2*SIGMA(3,3)+SIGMA(4,4))
  IWRES = IRES/W
ENDIF

IF(CMT.EQ.4)THEN
  IPRED = F
  IRES = DV-IPRED
  W = SQRT(IPRED**2*SIGMA(5,5)+SIGMA(6,6))
  IWRES = IRES/W
ENDIF

Y1 = IPRED + IPRED*EPS(1) + EPS(2)
Y2 = IPRED + IPRED*EPS(3) + EPS(4)
Y3 = IPRED + IPRED*EPS(5) + EPS(6)

Y = Y1*DRUG + Y2*LIG + Y3*LDL

$THETA  0.2 ; KA; 1/day ;first-order evolocumab absorption rate constant
 3 ; V; L     ;evolocumab volume of distribution
 0.3 ; CL; L/day ;evolocumab clearance
 2 ; KDEG; 1/day ;first-order PCSK9 degradation rate constant
 5 ; PCSK9_0; nM    ;initial PCSK9 concentration
 0.3 ; KSS; nM    ;steady-state constant
 0.05 ; KINT; 1/day ;first-order evolocumab-PCSK9 complex elimination rate constant
 0.6 ; PCSK9_0_HEALTHY; none  ;fold change in initial PCSK9 conc. for healthy vs. statin-treated
 0.72 FIX ; F1; none  ;evolocumab SC bioavailability
 0.3 ; KOUT; 1/day ;first-order elimination rate constant for LDL-C
 100 ; LDLC_0; mg/dL ;baseline LDL-C concentration
 1 FIX ; IMAX; none  ;maximal inhibition
 1 ; IC50; nM    ;serum unbound PCSK9 concentration associated with half-maximal inhibition
$OMEGA  BLOCK(1)
 0.1  ;        KA_
$OMEGA  BLOCK(1)
 0.03  ;         V_
$OMEGA  BLOCK(1)
 0.1  ;        CL_
$OMEGA  BLOCK(1) FIX
 0  ;      KDEG_
$OMEGA  BLOCK(1)
 0.03  ;   PCSK9_0_
$OMEGA  BLOCK(1)
 0.1  ;       KSS_
$OMEGA  BLOCK(1) FIX
 0  ;      KINT_
$OMEGA  BLOCK(1) FIX
 0  ;      KOUT_
$OMEGA  BLOCK(1)
 0.04  ;    LDLC_0_
$OMEGA  BLOCK(1) FIX
 0  ;      IMAX_
$OMEGA  BLOCK(1)
 0.1  ;      IC50_
$SIGMA  0.01  ; Evolocumab_Prop
 0  FIX  ; Evolocumab_Add
 0.01  ; PCSK9_Prop
 0  FIX  ;  PCSK9_Add
 0.01  ;  LDLC_Prop
 20  ;   LDLC_Add
$ESTIMATION METHOD=1 INTER NOHABORT MAXEVAL=9999 PRINT=5 NSIG=1 SIGL=3
$COVARIANCE PRINT=E MATRIX=S UNCONDITIONAL
;*...............80 Character limit............................................*
$TABLE      ID TIME DV CMT MDV EVID IPRED CWRES IWRES ONEHEADER
            NOPRINT FILE=sdtab1
$TABLE      ID KA V CL KDEG PCSK9_0 KSS KINT KOUT LDLC_0 IMAX IC50
            ONEHEADER NOPRINT FILE=patab1 ; model parameters
$TABLE      ID DOSEMG HEALTHY ONEHEADER NOPRINT FILE=catab1 ; categorical covariates
$TABLE      ID ONEHEADER NOPRINT FILE=cotab1 ; continuous covariates

NM-TRAN MESSAGES
 WARNINGS AND ERRORS (IF ANY) FOR PROBLEM    1
 (WARNING  2) NM-TRAN INFERS THAT THE DATA ARE POPULATION.
 (WARNING  3) THERE MAY BE AN ERROR IN THE ABBREVIATED CODE. THE FOLLOWING
 ONE OR MORE RANDOM VARIABLES ARE DEFINED WITH "IF" STATEMENTS THAT DO NOT
 PROVIDE DEFINITIONS FOR BOTH THE "THEN" AND "ELSE" CASES. IF ALL
 CONDITIONS FAIL, THE VALUES OF THESE VARIABLES WILL BE ZERO.
   IPRED IRES W IWRES
 (WARNING  79) SIGMA IS USED ON THE RIGHT. WITH A SUBSEQUENT RUN, IF AN
 INITIAL ESTIMATE OF A DIAGONAL BLOCK OF SIGMA IS TO BE COMPUTED BY
 NONMEM, THAT BLOCK WILL BE SET TO AN IDENTITY MATRIX DURING THAT
 COMPUTATION. THIS COULD LEAD TO AN ARITHMETIC EXCEPTION.*
 * THE MAXIMUM NUMBER OF WARNINGS OF ONE OR MORE TYPES WAS REACHED.
 IT IS POSSIBLE THAT SOME WARNING MESSAGES WERE SUPPRESSED.

1NONLINEAR MIXED EFFECTS MODEL PROGRAM (NONMEM) VERSION 7.4.4
 ORIGINALLY DEVELOPED BY STUART BEAL, LEWIS SHEINER, AND ALISON BOECKMANN
 CURRENT DEVELOPERS ARE ROBERT BAUER, ICON DEVELOPMENT SOLUTIONS,
 AND ALISON BOECKMANN. IMPLEMENTATION, EFFICIENCY, AND STANDARDIZATION
 PERFORMED BY NOUS INFOSYSTEMS.
 PROBLEM NO.:         1
 Simultaneous PKPD of the human anti-PCSK9 mAb evolocumab
 TOT. NO. OF OBS RECS:     2157
 TOT. NO. OF INDIVIDUALS:       39
 GENERAL NONLINEAR KINETICS MODEL WITH STIFF/NONSTIFF EQUATIONS (LSODA, ADVAN13)
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 #TBLN:      1
 #METH: First Order Conditional Estimation with Interaction
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
 #TERM:
0MINIMIZATION TERMINATED
 DUE TO ROUNDING ERRORS (ERROR=134)
 NO. OF FUNCTION EVALUATIONS USED:      738
 NO. OF SIG. DIGITS IN FINAL EST.:  0.2
 ADDITIONAL PROBLEMS OCCURRED WITH THE MINIMIZATION.
 REGARD THE RESULTS OF THE ESTIMATION STEP CAREFULLY, AND ACCEPT THEM ONLY
 AFTER CHECKING THAT THE COVARIANCE STEP PRODUCES REASONABLE OUTPUT.

 ETABAR IS THE ARITHMETIC MEAN OF THE ETA-ESTIMATES,
 AND THE P-VALUE IS GIVEN FOR THE NULL HYPOTHESIS THAT THE TRUE MEAN IS 0.

 ETABAR:         1.8279E-03 -1.6584E-02  3.1212E-03  0.0000E+00  6.9994E-03 -2.0634E-02  0.0000E+00  0.0000E+00 -3.9213E-04  0.0000E+00
                 7.3180E-03
 SE:             3.9614E-02  2.8113E-02  4.5552E-02  0.0000E+00  3.2497E-02  4.3668E-02  0.0000E+00  0.0000E+00  3.0199E-02  0.0000E+00
                 4.7335E-02
 N:                      39          39          39          39          39          39          39          39          39          39
                         39

 P VAL.:         9.6320E-01  5.5526E-01  9.4537E-01  1.0000E+00  8.2946E-01  6.3656E-01  1.0000E+00  1.0000E+00  9.8964E-01  1.0000E+00
                 8.7714E-01

 ETASHRINKSD(%)  5.8857E+00  1.1401E+01  1.4024E+01  1.0000E+02  1.0000E-10  6.2838E+00  1.0000E+02  1.0000E+02  1.4564E+00  1.0000E+02
                 1.6124E+01
 ETASHRINKVR(%)  1.1425E+01  2.1502E+01  2.6081E+01  1.0000E+02  1.0000E-10  1.2173E+01  1.0000E+02  1.0000E+02  2.8916E+00  1.0000E+02
                 2.9648E+01
 EBVSHRINKSD(%)  6.9986E+00  1.2232E+01  1.5924E+01  0.0000E+00  1.3891E+00  1.6127E+00  0.0000E+00  0.0000E+00  1.5444E+00  0.0000E+00
                 1.5751E+01
 EBVSHRINKVR(%)  1.3507E+01  2.2968E+01  2.9312E+01  0.0000E+00  2.7588E+00  3.1995E+00  0.0000E+00  0.0000E+00  3.0649E+00  0.0000E+00
                 2.9022E+01
 EPSSHRINKSD(%)  6.5409E+00  1.0000E+02  5.9585E+00  1.0000E+02  4.2882E+00  4.2882E+00
 EPSSHRINKVR(%)  1.2654E+01  1.0000E+02  1.1562E+01  1.0000E+02  8.3926E+00  8.3926E+00


 TOTAL DATA POINTS NORMALLY DISTRIBUTED (N):         2157
 N*LOG(2PI) CONSTANT TO OBJECTIVE FUNCTION:    3964.3008322449577
 OBJECTIVE FUNCTION VALUE WITHOUT CONSTANT:    925.42846322732066
 OBJECTIVE FUNCTION VALUE WITH CONSTANT:       4889.7292954722780
 REPORTED OBJECTIVE FUNCTION DOES NOT CONTAIN CONSTANT

 TOTAL EFFECTIVE ETAS (NIND*NETA):                           273


 #TERE:
 Elapsed estimation  time in seconds:   697.22
 Elapsed covariance  time in seconds:    38.65
 Elapsed postprocess time in seconds:     1.93

 ********************               FIRST ORDER CONDITIONAL ESTIMATION WITH INTERACTION              ********************
 #OBJT:**************                       MINIMUM VALUE OF OBJECTIVE FUNCTION                      ********************
 #OBJV:********************************************      925.428       **************************************************

 ********************               FIRST ORDER CONDITIONAL ESTIMATION WITH INTERACTION              ********************
 ********************                             FINAL PARAMETER ESTIMATE                           ********************

 THETA - VECTOR OF FIXED EFFECTS PARAMETERS   *********
         TH 1      TH 2      TH 3      TH 4      TH 5      TH 6      TH 7      TH 8      TH 9      TH10      TH11      TH12
          TH13
         2.28E-01  2.71E+00  2.76E-01  2.11E+00  5.88E+00  2.66E-01  5.28E-02  5.82E-01  7.20E-01  3.05E-01  1.13E+02  1.00E+00
          1.41E+00

 OMEGA - COV MATRIX FOR RANDOM EFFECTS - ETAS  ********
         ETA1      ETA2      ETA3      ETA4      ETA5      ETA6      ETA7      ETA8      ETA9      ET10      ET11
 ETA1
+        7.09E-02
 ETA2
+        0.00E+00  4.03E-02
 ETA3
+        0.00E+00  0.00E+00  1.12E-01
 ETA4
+        0.00E+00  0.00E+00  0.00E+00  0.00E+00
 ETA5
+        0.00E+00  0.00E+00  0.00E+00  0.00E+00  4.20E-02
 ETA6
+        0.00E+00  0.00E+00  0.00E+00  0.00E+00  0.00E+00  8.69E-02
 ETA7
+        0.00E+00  0.00E+00  0.00E+00  0.00E+00  0.00E+00  0.00E+00  0.00E+00
 ETA8
+        0.00E+00  0.00E+00  0.00E+00  0.00E+00  0.00E+00  0.00E+00  0.00E+00  0.00E+00
 ETA9
+        0.00E+00  0.00E+00  0.00E+00  0.00E+00  0.00E+00  0.00E+00  0.00E+00  0.00E+00  3.76E-02
 ET10
+        0.00E+00  0.00E+00  0.00E+00  0.00E+00  0.00E+00  0.00E+00  0.00E+00  0.00E+00  0.00E+00  0.00E+00
 ET11
+        0.00E+00  0.00E+00  0.00E+00  0.00E+00  0.00E+00  0.00E+00  0.00E+00  0.00E+00  0.00E+00  0.00E+00  1.27E-01

 SIGMA - COV MATRIX FOR RANDOM EFFECTS - EPSILONS  ****
         EPS1      EPS2      EPS3      EPS4      EPS5      EPS6
 EPS1
+        1.11E-02
 EPS2
+        0.00E+00  0.00E+00
         EPS1      EPS2      EPS3      EPS4      EPS5      EPS6
 EPS3
+        0.00E+00  0.00E+00  1.06E-02
 EPS4
+        0.00E+00  0.00E+00  0.00E+00  0.00E+00
 EPS5
+        0.00E+00  0.00E+00  0.00E+00  0.00E+00  1.01E-02
 EPS6
+        0.00E+00  0.00E+00  0.00E+00  0.00E+00  0.00E+00  1.94E+01

 OMEGA - CORR MATRIX FOR RANDOM EFFECTS - ETAS  *******
         ETA1      ETA2      ETA3      ETA4      ETA5      ETA6      ETA7      ETA8      ETA9      ET10      ET11
 ETA1
+        2.66E-01
 ETA2
+        0.00E+00  2.01E-01
 ETA3
+        0.00E+00  0.00E+00  3.35E-01
 ETA4
+        0.00E+00  0.00E+00  0.00E+00  0.00E+00
 ETA5
+        0.00E+00  0.00E+00  0.00E+00  0.00E+00  2.05E-01
 ETA6
+        0.00E+00  0.00E+00  0.00E+00  0.00E+00  0.00E+00  2.95E-01
 ETA7
+        0.00E+00  0.00E+00  0.00E+00  0.00E+00  0.00E+00  0.00E+00  0.00E+00
 ETA8
+        0.00E+00  0.00E+00  0.00E+00  0.00E+00  0.00E+00  0.00E+00  0.00E+00  0.00E+00
 ETA9
+        0.00E+00  0.00E+00  0.00E+00  0.00E+00  0.00E+00  0.00E+00  0.00E+00  0.00E+00  1.94E-01
 ET10
+        0.00E+00  0.00E+00  0.00E+00  0.00E+00  0.00E+00  0.00E+00  0.00E+00  0.00E+00  0.00E+00  0.00E+00
 ET11
+        0.00E+00  0.00E+00  0.00E+00  0.00E+00  0.00E+00  0.00E+00  0.00E+00  0.00E+00  0.00E+00  0.00E+00  3.57E-01

 SIGMA - CORR MATRIX FOR RANDOM EFFECTS - EPSILONS  ***
         EPS1      EPS2      EPS3      EPS4      EPS5      EPS6
 EPS1
+        1.05E-01
 EPS2
+        0.00E+00  0.00E+00
 EPS3
+        0.00E+00  0.00E+00  1.03E-01
 EPS4
+        0.00E+00  0.00E+00  0.00E+00  0.00E+00
 EPS5
+        0.00E+00  0.00E+00  0.00E+00  0.00E+00  1.00E-01
 EPS6
+        0.00E+00  0.00E+00  0.00E+00  0.00E+00  0.00E+00  4.41E+00

 ********************               FIRST ORDER CONDITIONAL ESTIMATION WITH INTERACTION              ********************
 ********************                            STANDARD ERROR OF ESTIMATE                          ********************

 THETA - VECTOR OF FIXED EFFECTS PARAMETERS   *********
         TH 1      TH 2      TH 3      TH 4      TH 5      TH 6      TH 7      TH 8      TH 9      TH10      TH11      TH12
          TH13
         1.74E-02  1.54E-01  3.70E-02  6.66E-02  4.28E-01  1.92E-02  5.45E-04  5.30E-02 .........  7.20E-03  5.33E+00 .........
          1.77E-01

 OMEGA - COV MATRIX FOR RANDOM EFFECTS - ETAS  ********
         ETA1      ETA2      ETA3      ETA4      ETA5      ETA6      ETA7      ETA8      ETA9      ET10      ET11
 ETA1
+        3.76E-02
 ETA2
+       .........  2.38E-02
 ETA3
+       ......... .........  4.82E-02
 ETA4
+       ......... ......... ......... .........
 ETA5
+       ......... ......... ......... .........  2.18E-02
 ETA6
+       ......... ......... ......... ......... .........  3.67E-02
 ETA7
+       ......... ......... ......... ......... ......... ......... .........
 ETA8
+       ......... ......... ......... ......... ......... ......... ......... .........
 ETA9
+       ......... ......... ......... ......... ......... ......... ......... .........  1.35E-02
 ET10
+       ......... ......... ......... ......... ......... ......... ......... ......... ......... .........
 ET11
+       ......... ......... ......... ......... ......... ......... ......... ......... ......... .........  5.35E-02

 SIGMA - COV MATRIX FOR RANDOM EFFECTS - EPSILONS  ****
         EPS1      EPS2      EPS3      EPS4      EPS5      EPS6
 EPS1
+        1.08E-03
 EPS2
+       ......... .........
         EPS1      EPS2      EPS3      EPS4      EPS5      EPS6
 EPS3
+       ......... .........  9.00E-04
 EPS4
+       ......... ......... ......... .........
 EPS5
+       ......... ......... ......... .........  1.54E-03
 EPS6
+       ......... ......... ......... ......... .........  6.02E+00

 OMEGA - CORR MATRIX FOR RANDOM EFFECTS - ETAS  *******
         ETA1      ETA2      ETA3      ETA4      ETA5      ETA6      ETA7      ETA8      ETA9      ET10      ET11
 ETA1
+        7.06E-02
 ETA2
+       .........  5.93E-02
 ETA3
+       ......... .........  7.19E-02
 ETA4
+       ......... ......... ......... .........
 ETA5
+       ......... ......... ......... .........  5.31E-02
 ETA6
+       ......... ......... ......... ......... .........  6.22E-02
 ETA7
+       ......... ......... ......... ......... ......... ......... .........
 ETA8
+       ......... ......... ......... ......... ......... ......... ......... .........
 ETA9
+       ......... ......... ......... ......... ......... ......... ......... .........  3.47E-02
 ET10
+       ......... ......... ......... ......... ......... ......... ......... ......... ......... .........
 ET11
+       ......... ......... ......... ......... ......... ......... ......... ......... ......... .........  7.49E-02

 SIGMA - CORR MATRIX FOR RANDOM EFFECTS - EPSILONS  ***
         EPS1      EPS2      EPS3      EPS4      EPS5      EPS6
 EPS1
+        5.15E-03
 EPS2
+       ......... .........
 EPS3
+       ......... .........  4.37E-03
 EPS4
+       ......... ......... ......... .........
 EPS5
+       ......... ......... ......... .........  7.69E-03
 EPS6
+       ......... ......... ......... ......... .........  6.83E-01
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
 ********************               FIRST ORDER CONDITIONAL ESTIMATION WITH INTERACTION              ********************
 ********************                      EIGENVALUES OF COR MATRIX OF ESTIMATE                     ********************

             1         2         3         4         5         6         7         8         9        10        11        12
             13        14        15        16        17        18        19        20        21        22
         3.33E-04  8.48E-02  1.10E-01  1.76E-01  2.12E-01  2.48E-01  2.97E-01  3.10E-01  3.85E-01  4.24E-01  5.06E-01  5.62E-01
          7.06E-01  8.71E-01  9.85E-01  1.05E+00  1.25E+00  1.53E+00  1.80E+00  2.44E+00  3.60E+00  4.46E+00
 Elapsed finaloutput time in seconds:     1.98
 #CPUT: Total CPU Time in Seconds,      740.094
