Tue 04/09/2024
01:34 PM
$PROBLEM    Mavoglurant PBPK (Wendling et al.,2016. DOI:
;           10.1208/s12248-015-9840-7) presented as an nlmixr2 example
;           (https://nlmixr2.org/articles/mavoglurant.html)
$INPUT      ID CMT EVID EVI2 MDV DV LNDV AMT TIME DOSE OCC RATE AGE
            SEX RACE WTKG HTM BLQ
$DATA      Mavoglurant_A2121_nmpk_edited.csv IGNORE=I
            IGNORE=(OCC.GT.1) IGNORE=(ID.GE.812) IGNORE=(BLQ.EQ.1)
 ; Match data subsets of nlmixr2 vignette
 ; Match data subsets of nlmixr2 vignette
 ; Match data subsets of nlmixr2 vignette
$SUBROUTINE ADVAN13 TRANS1 TOL=6 SUBROUTINES=D
$MODEL      COMP=(LU) ; 01
            COMP=(HT) ; 02
            COMP=(BR) ; 03
            COMP=(MU) ; 04
            COMP=(AD) ; 05
            COMP=(SK) ; 06
            COMP=(SP) ; 07
            COMP=(PA) ; 08
            COMP=(LI) ; 09
            COMP=(ST) ; 10
            COMP=(GU) ; 11
            COMP=(BO) ; 12
            COMP=(KI) ; 13
            COMP=(AB) ; 14
            COMP=(VB,DEFDOSE,DEFOBS) ; 15
            COMP=(RB) ; 16
$PK
  ;--- Initial

  CALLFL=-2
  R15=RATE

  ;--- Estimated Parameters

  lCLint = THETA(1)
  MU_1 = lCLint
  CLint = EXP(MU_1+ETA(1))

  KbBR = EXP(THETA(2))
  KbMU = EXP(THETA(3))
  KbAD = EXP(THETA(4))
  KbBO = EXP(THETA(5))
  KbRB = EXP(THETA(6))

  ;--- Fixed Physiological Parameters

  CO  = (187.00*WTKG**0.81)*60.0/1000.0 ; Cardiac output (L/h) from White et al (1968) as presented by nlmixr2 vignette
  QHT = 4.0 *CO/100.0
  QBR = 12.0*CO/100.0
  QMU = 17.0*CO/100.0
  QAD = 5.0 *CO/100.0
  QSK = 5.0 *CO/100.0
  QSP = 3.0 *CO/100.0
  QPA = 1.0 *CO/100.0
  QLI = 25.5*CO/100.0
  QST = 1.0 *CO/100.0
  QGU = 14.0*CO/100.0
  QHA = QLI - (QSP + QPA + QST + QGU) ; Hepatic artery blood flow
  QBO = 5.0 *CO/100.0
  QKI = 19.0*CO/100.0
  QRB = CO - (QHT + QBR + QMU + QAD + QSK + QLI + QBO + QKI)
  QLU = QHT + QBR + QMU + QAD + QSK + QLI + QBO + QKI + QRB

  VLU = (0.76 *WTKG/100.0)/1.051
  VHT = (0.47 *WTKG/100.0)/1.030
  VBR = (2.00 *WTKG/100.0)/1.036
  VMU = (40.00*WTKG/100.0)/1.041
  VAD = (21.42*WTKG/100.0)/0.916
  VSK = (3.71 *WTKG/100.0)/1.116
  VSP = (0.26 *WTKG/100.0)/1.054
  VPA = (0.14 *WTKG/100.0)/1.045
  VLI = (2.57 *WTKG/100.0)/1.040
  VST = (0.21 *WTKG/100.0)/1.050
  VGU = (1.44 *WTKG/100.0)/1.043
  VBO = (14.29*WTKG/100.0)/1.990
  VKI = (0.44 *WTKG/100.0)/1.050
  VAB = (2.81 *WTKG/100.0)/1.040
  VVB = (5.62 *WTKG/100.0)/1.040
  VRB = (3.86 *WTKG/100.0)/1.040

  ;--- Fixed Drug-specific Parameters

  BP = 0.61    ; Blood:plasma partition coefficient
  fup = 0.028  ; Fraction unbound in plasma
  fub = fup/BP ; Fraction unbound in blood

  KbLU = exp(0.8334)
  KbHT = exp(1.1205)
  KbSK = exp(-.5238)
  KbSP = exp(0.3224)
  KbPA = exp(0.3224)
  KbLI = exp(1.7604)
  KbST = exp(0.3224)
  KbGU = exp(1.2026)
  KbKI = exp(1.3171)

  ;--- Finalize

  S15 = VVB*BP/1000.0

$DES

  DADT(1) = QLU*(A(15)/VVB - A(1)/KbLU/VLU)
  DADT(2) = QHT*(A(14)/VAB - A(2)/KbHT/VHT)
  DADT(3) = QBR*(A(14)/VAB - A(3)/KbBR/VBR)
  DADT(4) = QMU*(A(14)/VAB - A(4)/KbMU/VMU)
  DADT(5) = QAD*(A(14)/VAB - A(5)/KbAD/VAD)
  DADT(6) = QSK*(A(14)/VAB - A(6)/KbSK/VSK)
  DADT(7) = QSP*(A(14)/VAB - A(7)/KbSP/VSP)
  DADT(8) = QPA*(A(14)/VAB - A(8)/KbPA/VPA)
  DADT(9) = QHA*A(14)/VAB + QSP*A(7)/KbSP/VSP + QPA*A(8)/KbPA/VPA + QST*A(10)/KbST/VST + QGU*A(11)/KbGU/VGU - CLint*fub*A(9)/KbLI/VLI - QLI*A(9)/KbLI/VLI
  DADT(10) = QST*(A(14)/VAB - A(10)/KbST/VST)
  DADT(11) = QGU*(A(14)/VAB - A(11)/KbGU/VGU)
  DADT(12) = QBO*(A(14)/VAB - A(12)/KbBO/VBO)
  DADT(13) = QKI*(A(14)/VAB - A(13)/KbKI/VKI)
  DADT(14) = QLU*(A(1)/KbLU/VLU - A(14)/VAB)
  DADT(15) = QHT*A(2)/KbHT/VHT + QBR*A(3)/KbBR/VBR + QMU*A(4)/KbMU/VMU + QAD*A(5)/KbAD/VAD + QSK*A(6)/KbSK/VSK + QLI*A(9)/KbLI/VLI + QBO*A(12)/KbBO/VBO + QKI*A(13)/KbKI/VKI + QRB*A(16)/KbRB/VRB - QLU*A(15)/VVB
  DADT(16) = QRB*(A(14)/VAB - A(16)/KbRB/VRB)

  C15 = A(15)/S15

$THETA  7.6 ; lCLint
 1.1 ; lKbBR
 0.3 ; lKbMU
 2.0 ; lKbAD
 0.03 ; lKbBO
 0.3 ; lKbRB
$OMEGA  4.00  ; IIV on CLint
$SIGMA  10.0  ; proportional residual variability
 1.00  ; additive residual variability
$ERROR

  IPRED = A(15)/S15
  IRES=DV-IPRED
  W=SQRT(IPRED**2*SIGMA(1,1)+SIGMA(2,2))
  IWRES=IRES/W
  F_FLAG = 0
  Y = IPRED + IPRED*EPS(1) + EPS(2)

; $EST METHOD=IMP INTERACTION NOABORT PRINT=5 NOABORT AUTO=1 RANMETHOD=S2P CTYPE=3 NITER=5000

$ESTIMATION METHOD=CONDITIONAL INTERACTION MAXEVAL=9999 PRINT=1
            NOABORT NOTBT NOOBT NOSBT NSIG=2 SIGL=6
$COVARIANCE UNCONDITIONAL
$TABLE      ID EVID CMT DOSE C15 WTKG CLint ETAS(1:LAST) NPDE CWRES
            IWRES IPRED NOPRINT ONEHEADER FILE=mod1.tbl

NM-TRAN MESSAGES
 WARNINGS AND ERRORS (IF ANY) FOR PROBLEM    1
 (WARNING  2) NM-TRAN INFERS THAT THE DATA ARE POPULATION.
 (WARNING  48) DES-DEFINED ITEMS ARE COMPUTED ONLY WHEN EVENT TIME
 INCREASES. E.G., DISPLAYED VALUES ASSOCIATED WITH THE FIRST EVENT RECORD
 OF AN INDIVIDUAL RECORD ARE COMPUTED WITH (THE LAST ADVANCE TO) AN EVENT
 TIME OF THE PRIOR INDIVIDUAL RECORD.
 (WARNING  79) SIGMA IS USED ON THE RIGHT. WITH A SUBSEQUENT RUN, IF AN
 INITIAL ESTIMATE OF A DIAGONAL BLOCK OF SIGMA IS TO BE COMPUTED BY
 NONMEM, THAT BLOCK WILL BE SET TO AN IDENTITY MATRIX DURING THAT
 COMPUTATION. THIS COULD LEAD TO AN ARITHMETIC EXCEPTION.*
 * THE MAXIMUM NUMBER OF WARNINGS OF ONE OR MORE TYPES WAS REACHED.
 IT IS POSSIBLE THAT SOME WARNING MESSAGES WERE SUPPRESSED.

1NONLINEAR MIXED EFFECTS MODEL PROGRAM (NONMEM) VERSION 7.4.4
 ORIGINALLY DEVELOPED BY STUART BEAL, LEWIS SHEINER, AND ALISON BOECKMANN
 CURRENT DEVELOPERS ARE ROBERT BAUER, ICON DEVELOPMENT SOLUTIONS,
 AND ALISON BOECKMANN. IMPLEMENTATION, EFFICIENCY, AND STANDARDIZATION
 PERFORMED BY NOUS INFOSYSTEMS.
 PROBLEM NO.:         1
 Mavoglurant PBPK (Wendling et al.,2016. DOI:
 TOT. NO. OF OBS RECS:      256
 TOT. NO. OF INDIVIDUALS:       19
 GENERAL NONLINEAR KINETICS MODEL WITH STIFF/NONSTIFF EQUATIONS (LSODA, ADVAN13)
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 #TBLN:      1
 #METH: First Order Conditional Estimation with Interaction
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
 #TERM:
0MINIMIZATION SUCCESSFUL
 HOWEVER, PROBLEMS OCCURRED WITH THE MINIMIZATION.
 REGARD THE RESULTS OF THE ESTIMATION STEP CAREFULLY, AND ACCEPT THEM ONLY
 AFTER CHECKING THAT THE COVARIANCE STEP PRODUCES REASONABLE OUTPUT.
 NO. OF FUNCTION EVALUATIONS USED:      799
 NO. OF SIG. DIGITS IN FINAL EST.:  2.8

 ETABAR IS THE ARITHMETIC MEAN OF THE ETA-ESTIMATES,
 AND THE P-VALUE IS GIVEN FOR THE NULL HYPOTHESIS THAT THE TRUE MEAN IS 0.

 ETABAR:        -7.2140E-04
 SE:             6.2022E-02
 N:                      19

 P VAL.:         9.9072E-01

 ETASHRINKSD(%)  3.7014E+00
 ETASHRINKVR(%)  7.2658E+00
 EBVSHRINKSD(%)  5.9433E+00
 EBVSHRINKVR(%)  1.1533E+01
 EPSSHRINKSD(%)  2.9359E+00  2.9359E+00
 EPSSHRINKVR(%)  5.7856E+00  5.7856E+00


 TOTAL DATA POINTS NORMALLY DISTRIBUTED (N):          256
 N*LOG(2PI) CONSTANT TO OBJECTIVE FUNCTION:    470.49652900079241
 OBJECTIVE FUNCTION VALUE WITHOUT CONSTANT:    1963.6238498152991
 OBJECTIVE FUNCTION VALUE WITH CONSTANT:       2434.1203788160915
 REPORTED OBJECTIVE FUNCTION DOES NOT CONTAIN CONSTANT

 TOTAL EFFECTIVE ETAS (NIND*NETA):                            19


 #TERE:
 Elapsed estimation  time in seconds:   434.54
 Elapsed covariance  time in seconds:   227.18
 Elapsed postprocess time in seconds:     9.61

 ********************               FIRST ORDER CONDITIONAL ESTIMATION WITH INTERACTION              ********************
 #OBJT:**************                       MINIMUM VALUE OF OBJECTIVE FUNCTION                      ********************
 #OBJV:********************************************     1963.624       **************************************************

 ********************               FIRST ORDER CONDITIONAL ESTIMATION WITH INTERACTION              ********************
 ********************                             FINAL PARAMETER ESTIMATE                           ********************

 THETA - VECTOR OF FIXED EFFECTS PARAMETERS   *********
         TH 1      TH 2      TH 3      TH 4      TH 5      TH 6
         7.16E+00  2.00E+00  4.53E-01  2.31E+00 -1.87E-01 -1.02E+01

 OMEGA - COV MATRIX FOR RANDOM EFFECTS - ETAS  ********
         ETA1
 ETA1
+        8.32E-02

 SIGMA - COV MATRIX FOR RANDOM EFFECTS - EPSILONS  ****
         EPS1      EPS2
 EPS1
+        8.69E-02
 EPS2
+        0.00E+00  2.74E-01

 OMEGA - CORR MATRIX FOR RANDOM EFFECTS - ETAS  *******
         ETA1
 ETA1
+        2.88E-01

 SIGMA - CORR MATRIX FOR RANDOM EFFECTS - EPSILONS  ***
         EPS1      EPS2
 EPS1
+        2.95E-01
 EPS2
+        0.00E+00  5.24E-01

 ********************               FIRST ORDER CONDITIONAL ESTIMATION WITH INTERACTION              ********************
 ********************                            STANDARD ERROR OF ESTIMATE                          ********************

 THETA - VECTOR OF FIXED EFFECTS PARAMETERS   *********
         TH 1      TH 2      TH 3      TH 4      TH 5      TH 6
         7.42E-02  2.17E-01  2.21E-01  1.63E-01  1.55E-01  3.44E+01

 OMEGA - COV MATRIX FOR RANDOM EFFECTS - ETAS  ********
         ETA1
 ETA1
+        2.30E-02

 SIGMA - COV MATRIX FOR RANDOM EFFECTS - EPSILONS  ****
         EPS1      EPS2
 EPS1
+        1.46E-02
 EPS2
+       .........  9.16E-01

 OMEGA - CORR MATRIX FOR RANDOM EFFECTS - ETAS  *******
         ETA1
 ETA1
+        3.99E-02

 SIGMA - CORR MATRIX FOR RANDOM EFFECTS - EPSILONS  ***
         EPS1      EPS2
 EPS1
+        2.48E-02
 EPS2
+       .........  8.75E-01

 ********************               FIRST ORDER CONDITIONAL ESTIMATION WITH INTERACTION              ********************
 ********************                          COVARIANCE MATRIX OF ESTIMATE                         ********************

            TH 1      TH 2      TH 3      TH 4      TH 5      TH 6      OM11      SG11      SG12      SG22
 TH 1
+        5.50E-03
 TH 2
+        7.17E-03  4.73E-02
 TH 3
+        9.14E-04 -2.07E-02  4.89E-02
 TH 4
+        4.75E-04 -5.98E-03  2.78E-02  2.65E-02
 TH 5
+        4.44E-03  3.28E-02 -2.13E-02 -9.86E-03  2.41E-02
 TH 6
+        5.90E-03 -1.21E+00  5.78E+00  5.45E+00 -2.05E+00  1.18E+03
 OM11
+       -6.12E-04 -2.93E-04  6.56E-04 -1.64E-04 -2.07E-04  3.16E-02  5.29E-04
 SG11
+        2.75E-04  1.69E-04  1.90E-03  1.35E-03 -2.50E-04  3.09E-01 -3.75E-05  2.14E-04
 SG12
+       ......... ......... ......... ......... ......... ......... ......... ......... .........
 SG22
+        9.30E-04  3.84E-02 -1.53E-01 -1.45E-01  5.85E-02 -3.15E+01 -5.19E-04 -8.07E-03 .........  8.39E-01

 ********************               FIRST ORDER CONDITIONAL ESTIMATION WITH INTERACTION              ********************
 ********************                          CORRELATION MATRIX OF ESTIMATE                        ********************

            TH 1      TH 2      TH 3      TH 4      TH 5      TH 6      OM11      SG11      SG12      SG22
 TH 1
+        7.42E-02
 TH 2
+        4.45E-01  2.17E-01
 TH 3
+        5.58E-02 -4.31E-01  2.21E-01
 TH 4
+        3.94E-02 -1.69E-01  7.73E-01  1.63E-01
 TH 5
+        3.85E-01  9.71E-01 -6.19E-01 -3.90E-01  1.55E-01
 TH 6
+        2.31E-03 -1.61E-01  7.59E-01  9.72E-01 -3.83E-01  3.44E+01
 OM11
+       -3.59E-01 -5.87E-02  1.29E-01 -4.37E-02 -5.80E-02  4.00E-02  2.30E-02
 SG11
+        2.54E-01  5.30E-02  5.89E-01  5.67E-01 -1.10E-01  6.14E-01 -1.11E-01  1.46E-02
 SG12
+       ......... ......... ......... ......... ......... ......... ......... ......... .........
 SG22
+        1.37E-02  1.93E-01 -7.57E-01 -9.73E-01  4.11E-01 -9.99E-01 -2.46E-02 -6.03E-01 .........  9.16E-01
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 Elapsed finaloutput time in seconds:     0.08
 #CPUT: Total CPU Time in Seconds,      671.125
